# 6.3.2
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x := [1.8; 2; 2.5; 3.2; 3.8; 4; 4.5; 5.1]
n := 7
y := [-0.07; -0.05; 0; 0.15; 0.32; 0.38; 0.55; 0.77]
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f(x, a, b, c, d) := a + b*(x + 1) + c*ln(x + 1) + d*sqrt(x + 1)
# Функция σ возвращает значение среднеквадратичного уклонения многочлена f
σ(a, b, c, d) := sqrt(1/(n - 1)*sum((f(x[k], a, b, c, d) - y[k])^2, k = 0 .. n))
# Для нахождения экстремума  рассмотрим функцию
σ1(a, b, c, d) := sum((f(x[k], a, b, c, d) - y[k])^2, k = 0 .. n)  # -> min
# Запишем систему уравнений
Given
sum(f(x[k], a, b, c, d) - y[k], k = 0 .. n) == 0
sum((f(x[k], a, b, c, d) - y[k])*(x[k] - 1), k = 0 .. n) == 0
sum((f(x[k], a, b, c, d) - y[k])*ln(x[k] + 1), k = 0 .. n) == 0
sum((f(x[k], a, b, c, d) - y[k])*sqrt(x[k] + 1), k = 0 .. n) == 0
r := Find(a, b, c, d)  # error: This variable is undefined.
# Теперь решим систему с помощью функции lsolve
M := [
    sum(1, k = 0 .. n), sum(x[k] - 1, k = 0 .. n), sum(ln(x[k] + 1), k = 0 .. n), sum(sqrt(x[k] + 1), k = 0 .. n);
    sum(x[k] - 1, k = 0 .. n), sum((x[k] - 1)^2, k = 0 .. n), sum(ln(x[k] + 1)*(x[k] - 1), k = 0 .. n), sum(sqrt(x[k] + 1)*(x[k] - 1), k = 0 .. n);
    sum(ln(x[k] + 1), k = 0 .. n), sum((x[k] - 1)*ln(x[k] + 1), k = 0 .. n), sum(ln(x[k] + 1)^2, k = 0 .. n), sum(sqrt(x[k] + 1)*ln(x[k] + 1), k = 0 .. n);
    sum(sqrt(x[k] + 1), k = 0 .. n), sum((x[k] - 1)*sqrt(x[k] + 1), k = 0 .. n), sum(ln(x[k] + 1)*sqrt(x[k] + 1), k = 0 .. n), sum(sqrt(x[k] + 1)^2, k = 0 .. n)
]
M = [
    8, 18.9, 11.5072, 16.5676;
    18.9, 54.63, 29.5597, 41.5628;
    11.5072, 29.5597, 17.1229, 24.4101;
    16.5676, 41.5628, 24.4101, 34.9
]
B := [
    sum(y[k], k = 0 .. n);
    sum(y[k]*(x[k] - 1), k = 0 .. n);
    sum(y[k]*ln(x[k] + 1), k = 0 .. n);
    sum(y[k]*sqrt(x[k] + 1), k = 0 .. n)
]
B = [2.05; 7.342; 3.5318; 4.84609]
r := lsolve(M, B)
a := r[0] - 1.07
r = [-0.049652; 0.534685; -2.48193; 1.2616]
b := r[1]
c := r[2]
i := 0 .. n
d := r[3]
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