F(x, y) := e^(x*y) - cos(y^2) - sin((x - y)^2)^1
d/dx(e^(x*y) - cos(y^2) - sin((x - y)^2)) → y*e^(x*y) - cos((x - y)^2)*(2*x - 2*y)
d/dy(e^(x*y) - cos(y^2) - sin((x - y)^2)) → 2*y*sin(y^2) + cos((x - y)^2)*(2*x - 2*y) + x*e^(x*y)
x1 := -3
x2 := 1
f(y) := F(x1, y)
F(x1, -0.228354) = 2.84219e-6
root(f(x2), x2) = 1.02247
fn(x) :=
    y ← 0.119357
    while |F(x, y)| ≥ 0.0001
        y ← y - F(x, y)/(-d/dy(F(x, y))/d/dx(F(x, y)))
        i ← 1
    y
# x = -1
# 6.162854
# 5.040501
# 1.920971
# 20.060141
# x = -3
# 1.555576
# 5.249736
# 20.113449
# 0.04976
fn(-3) = 0.119357
F(x, y) := e^(x*y) - cos(y^2) - sin((x - y)^2)^1
F(-3, 1.555576) = -0.185055
F(-3, 2) = 0.788474
F(-3, 5.249736) = 1.62618
F(-3, 6.5) = -0.59455
F(-3, 20.113449) = 0.595259
F(-3, 0.04)
# [component: inputs F]
F(-3, -3) = 8104
