N := 128
f(t) := sin(2*π*4*t)*(t + 0.75) + 3*t + 7 + 16*t^2
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f2(x) :=
    res ← f(x) if ((x ≥ 0) and (x ≤ 1))
    res ← f(2 - x) otherwise
    res
i := 0 .. 2*N - 1
vx[i] := i/N
vy[i] := f2(vx[i])
C := cfft(vy)
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Modul(C, n) :=
    for i ∈ 0 .. n - 1
        res[i] ← |C[i]|
    res
ε(vy, v, n) :=
    s ← 0
    sn ← 0
    for i ∈ 0 .. n - 1
        sn ← sn + |v[i]|^2
        s ← vy[i]^2 + s
    sqrt((s - sn)/s)
new_Vector(r, C, n) :=
    for i ∈ 0 .. n - 1
        res[i] ← C[i] if r[i] == 0
        res[i] ← 0 otherwise
    res
Vyborka(C, n, no) :=
    for i ∈ 0 .. n - 1
        r[i] ← -1
    a ← 0
    while a < no
        maxim ← -1
        index ← -1
        for i ∈ 0 .. n - 1
            if ((C[i] > maxim) and (r[i] == -1))
                maxim ← C[i]
                index ← i
        r[index] ← 0
        a ← a + 1
    r
grafik(R, N, t, vx) :=
    for i ∈ 0 .. N - 2
        if (t ≥ vx[i]) and (t ≤ vx[i + 1])
            h ← (R[i + 1] - R[i])/(vx[i + 1] - vx[i])
            res ← R[i + 1] - h*(vx[i + 1] - t)
            break
    res
T(No) := new_Vector(Vyborka(Modul(C, 2*N), 2*N, No), C, 2*N)
R(No) := Re(icfft(T(No)))
A := R(20)
t := 0, 0.001 .. 2
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