σ := 0.15
f2(x) := 0.05*x + (x - 0.5)*e^(-(x - 0.5)^2/σ^2)
f4(x) :=
    res ← f2(x) if ((x ≥ 0) and (x ≤ 1))
    res ← f2(2 - x) otherwise
    res
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VectorX(xo, xn, n) :=
    for i ∈ 0 .. n - 1
        x[i] ← xo + i*(xn - xo)/n
    x
VectorY(f, n, vx) :=
    for i ∈ 0 .. n - 1
        y[i] ← f(vx[i])
    y
new_Vector(r, C, n) :=
    for i ∈ 0 .. n - 1
        res[i] ← C[i] if r[i] == 0
        res[i] ← 0 otherwise
    res
Modul(C, n) :=
    for i ∈ 0 .. n - 1
        res[i] ← |C[i]|
    res
Vyborka(C, n, no) :=
    for i ∈ 0 .. n - 1
        r[i] ← -1
    a ← 0
    while a < no
        maxim ← -1
        index ← -1
        for i ∈ 0 .. n - 1
            if ((C[i] > maxim) and (r[i] == -1))
                maxim ← C[i]
                index ← i
        r[index] ← 0
        a ← a + 1
    r
N := 512
vx := VectorX(0, 2, 2*N)
vy := VectorY(f4, 2*N, vx)
C := cfft(vy)
T(No) := new_Vector(Vyborka(Modul(C, 2*N), 2*N, No), C, 2*N)
R(No) := Re(icfft(T(No)))
grafik(R, N, t, vx) :=
    for i ∈ 0 .. N - 2
        if (t ≥ vx[i]) and (t ≤ vx[i + 1])
            h ← (R[i + 1] - R[i])/(vx[i + 1] - vx[i])
            res ← R[i + 1] - h*(vx[i + 1] - t)
            break
    res
ε(vy, v, n) :=
    s ← 0
    sn ← 0
    for i ∈ 0 .. n - 1
        sn ← sn + |v[i]|^2
        s ← vy[i]^2 + s
    sqrt((s - sn)/s)
A := R(10)
t := 0, 0.001 .. 2
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ε(vy, T(10), 2*N) = 0.0230613
A := R(20)
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ε(vy, T(20), 2*N) = 0.00151511
A := R(100)
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ε(vy, T(100), 2*N) = 0.000136906
i := 1 .. 20
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