N := 16
ν := 2
VY(f, n, vx) :=
    for i ∈ 0 .. n - 1
        y[i] ← f(vx[i])
    y
f1(n) := sin(2*π*ν*n/N)
i := 0 .. N - 1
ν := 4
vx[i] := i
f2(n) := sin(2*π*ν*n/N)
m := 1 .. N - 1
vy1 := VY(f1, N, vx)
vy2 := VY(f2, N, vx)
C1 := cfft(vy1)
C2 := cfft(vy2)
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ν := 8
f3(n) := sin(2*π*ν*n/N)
ν := 16
vy3 := VY(f3, N, vx)
f4(n) := sin(2*π*ν*n/N)
C3 := cfft(vy3)
vy4 := VY(f4, N, vx)
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C4 := cfft(vy4)
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